# OpenSim document version 40500
Model:
  Ground
  BodySet:
    Body b1: mass=1 [kg] mass_center=(0 0 0) inertia=(0 0 0 0 0 0)
    Body b2: mass=1 mass_center=(0 0 0) inertia=(0 0 0 0 0 0)
    Body b3: mass=1 mass_center=(0 0 0) inertia=(0 0 0 0 0 0)
  JointSet:
    PinJoint j1: socket_parent_frame=ground_offset socket_child_frame=b1_offset
      Coordinate j1_coord_0
      PhysicalOffsetFrame ground_offset: socket_parent=/ground translation=(0 0 0) [meters]
      PhysicalOffsetFrame b1_offset: socket_parent=/bodyset/b1 translation=(0 1 0)
    PinJoint j2: socket_parent_frame=b1_offset socket_child_frame=b2_offset
      Coordinate j2_coord_0
      PhysicalOffsetFrame b1_offset: socket_parent=/bodyset/b1 translation=(0 0 0)
      PhysicalOffsetFrame b2_offset: socket_parent=/bodyset/b2 translation=(0 0.5 0)
    PinJoint j3: socket_parent_frame=b2_offset socket_child_frame=b3_offset
      Coordinate j3_coord_0
      PhysicalOffsetFrame b2_offset: socket_parent=/bodyset/b2 translation=(0 0 0)
      PhysicalOffsetFrame b3_offset: socket_parent=/bodyset/b3 translation=(0 0.2 0)
  ForceSet:
    Millard2012EquilibriumMuscle m_0: min_control=0.01 max_control=1 max_isometric_force=1 optimal_fiber_length=0.6
        tendon_slack_length=0.55 pennation_angle_at_optimal=0 [radians]
      PathPoint origin: ground (-0.1254599 0.4507143 0.2319939)
      PathPoint insertion: b2 (0.09865848 -0.3439814 -0.3440055)
      ActiveForceLengthCurve: minimum_value=0
      ForceVelocityCurve: concentric_slope_at_vmax=0 concentric_slope_near_vmax=0.25 isometric_slope=5
          eccentric_slope_at_vmax=0 eccentric_slope_near_vmax=0.15 max_eccentric_velocity_force_multiplier=1.4
      FiberForceLengthCurve
      TendonForceLengthCurve
    Millard2012EquilibriumMuscle m_1: min_control=0.01 max_control=1 max_isometric_force=1 optimal_fiber_length=0.6
        tendon_slack_length=0.55 pennation_angle_at_optimal=0
      PathPoint origin: b2 (-0.4419164 0.3661761 0.101115)
      PathPoint insertion: b3 (0.2080726 -0.4794155 0.4699099)
      ActiveForceLengthCurve: minimum_value=0
      ForceVelocityCurve: concentric_slope_at_vmax=0 concentric_slope_near_vmax=0.25 isometric_slope=5
          eccentric_slope_at_vmax=0 eccentric_slope_near_vmax=0.15 max_eccentric_velocity_force_multiplier=1.4
      FiberForceLengthCurve
      TendonForceLengthCurve
    Millard2012EquilibriumMuscle m_2: min_control=0.01 max_control=1 max_isometric_force=1 optimal_fiber_length=0.6
        tendon_slack_length=0.55 pennation_angle_at_optimal=0
      PathPoint origin: b1 (0.3324426 -0.2876609 -0.318175)
      PathPoint insertion: b3 (-0.3165955 -0.1957578 0.02475643)
      ActiveForceLengthCurve: minimum_value=0
      ForceVelocityCurve: concentric_slope_at_vmax=0 concentric_slope_near_vmax=0.25 isometric_slope=5
          eccentric_slope_at_vmax=0 eccentric_slope_near_vmax=0.15 max_eccentric_velocity_force_multiplier=1.4
      FiberForceLengthCurve
      TendonForceLengthCurve
