# OpenSim document version 40500
Model:
  Ground
  BodySet:
    Body humerus: mass=1 [kg] mass_center=(0 0 0) inertia=(0 0 0 0 0 0)
    Body radius: mass=1 mass_center=(0 0 0) inertia=(0 0 0 0 0 0)
    Body hand: mass=1 mass_center=(0 0 0) inertia=(0 0 0 0 0 0)
  JointSet:
    GimbalJoint shoulder: socket_parent_frame=ground_offset socket_child_frame=humerus_offset
      Coordinate shoulder_coord_0
      Coordinate shoulder_coord_1
      Coordinate shoulder_coord_2
      PhysicalOffsetFrame ground_offset: socket_parent=/ground translation=(0 0 0) [meters]
      PhysicalOffsetFrame humerus_offset: socket_parent=/bodyset/humerus translation=(0 1 0)
    GimbalJoint elbow: socket_parent_frame=humerus_offset socket_child_frame=radius_offset
      Coordinate elbow_coord_0
      Coordinate elbow_coord_1
      Coordinate elbow_coord_2
      PhysicalOffsetFrame humerus_offset: socket_parent=/bodyset/humerus translation=(0 0 0)
      PhysicalOffsetFrame radius_offset: socket_parent=/bodyset/radius translation=(0 0.5 0)
    GimbalJoint wrist: socket_parent_frame=radius_offset socket_child_frame=hand_offset
      Coordinate wrist_coord_0
      Coordinate wrist_coord_1
      Coordinate wrist_coord_2
      PhysicalOffsetFrame radius_offset: socket_parent=/bodyset/radius translation=(0 0 0)
      PhysicalOffsetFrame hand_offset: socket_parent=/bodyset/hand translation=(0 0.2 0)
  ForceSet:
    Millard2012EquilibriumMuscle [values shared by the 80 below unless stated]: min_control=0.01 max_control=1
        max_isometric_force=200 optimal_fiber_length=0.6 tendon_slack_length=0.55
        pennation_angle_at_optimal=0 [radians]
      ActiveForceLengthCurve: minimum_value=0
      ForceVelocityCurve: concentric_slope_at_vmax=0 concentric_slope_near_vmax=0.25 isometric_slope=5
          eccentric_slope_at_vmax=0 eccentric_slope_near_vmax=0.15 max_eccentric_velocity_force_multiplier=1.4
      FiberForceLengthCurve
      TendonForceLengthCurve
    Millard2012EquilibriumMuscle m_0:
      PathPoint origin: ground (-0.1254599 0.4507143 0.2319939)
      PathPoint insertion: humerus (0.09865848 -0.3439814 -0.3440055)
    Millard2012EquilibriumMuscle m_1:
      PathPoint origin: ground (-0.4419164 0.3661761 0.101115)
      PathPoint insertion: humerus (0.2080726 -0.4794155 0.4699099)
    Millard2012EquilibriumMuscle m_2:
      PathPoint origin: ground (0.3324426 -0.2876609 -0.318175)
      PathPoint insertion: humerus (-0.3165955 -0.1957578 0.02475643)
    Millard2012EquilibriumMuscle m_3:
      PathPoint origin: ground (-0.06805498 -0.2087709 0.1118529)
      PathPoint insertion: humerus (-0.3605061 -0.2078554 -0.1336382)
    Millard2012EquilibriumMuscle m_4:
      PathPoint origin: ground (-0.04393002 0.285176 -0.3003262)
      PathPoint insertion: humerus (0.01423444 0.09241457 -0.4535496)
    Millard2012EquilibriumMuscle m_5:
      PathPoint origin: ground (0.1075449 -0.3294759 -0.4349484)
      PathPoint insertion: humerus (0.4488855 0.465632 0.3083973)
    Millard2012EquilibriumMuscle m_6:
      PathPoint origin: ground (-0.1953862 -0.4023279 0.184233)
      PathPoint insertion: humerus (-0.05984751 -0.3779618 -0.00482309)
    Millard2012EquilibriumMuscle m_7:
      PathPoint origin: ground (-0.4656115 0.4093204 -0.24122)
      PathPoint insertion: humerus (0.1625223 -0.1882889 0.02006802)
    Millard2012EquilibriumMuscle m_8:
      PathPoint origin: ground (0.04671028 -0.3151455 0.4695846)
      PathPoint insertion: humerus (0.2751328 0.4394989 0.3948274)
    Millard2012EquilibriumMuscle m_9:
      PathPoint origin: ground (0.09789998 0.4218742 -0.4115075)
      PathPoint insertion: humerus (-0.3040171 -0.4547727 -0.1746697)
    Millard2012EquilibriumMuscle m_10:
      PathPoint origin: ground (-0.1113227 -0.228651 0.3287375)
      PathPoint insertion: humerus (-0.1432467 -0.2190655 0.04269608)
    Millard2012EquilibriumMuscle m_11:
      PathPoint origin: ground (-0.3590758 0.302197 -0.4254494)
      PathPoint insertion: humerus (0.4868869 0.2722448 -0.3012843)
    Millard2012EquilibriumMuscle m_12:
      PathPoint origin: ground (-0.4944779 0.3154614 0.2068573)
      PathPoint insertion: humerus (0.2290072 0.2712703 -0.4259553)
    Millard2012EquilibriumMuscle m_13:
      PathPoint origin: ground (-0.1415343 -0.3841309 0.3631034)
      PathPoint insertion: humerus (0.1232981 -0.169102 -0.4364416)
    Millard2012EquilibriumMuscle m_14:
      PathPoint origin: ground (-0.1890177 -0.1748167 0.2296062)
      PathPoint insertion: humerus (0.1375575 0.3872127 -0.02778507)
    Millard2012EquilibriumMuscle m_15:
      PathPoint origin: ground (-0.3804058 0.2132448 0.260785)
      PathPoint insertion: humerus (0.0612772 0.2709672 -0.006204404)
    Millard2012EquilibriumMuscle m_16:
      PathPoint origin: ground (0.02273283 -0.07245898 -0.4745809)
      PathPoint insertion: humerus (-0.3921086 -0.4685708 0.1364104)
    Millard2012EquilibriumMuscle m_17:
      PathPoint origin: ground (-0.185644 0.008570691 0.4075665)
      PathPoint insertion: humerus (-0.2507078 -0.08961708 0.2555511)
    Millard2012EquilibriumMuscle m_18:
      PathPoint origin: ground (-0.2712018 -0.4230201 -0.2102485)
      PathPoint insertion: humerus (-0.3387787 0.4296977 0.3081204)
    Millard2012EquilibriumMuscle m_19:
      PathPoint origin: ground (0.1334038 0.3714606 0.3036721)
      PathPoint insertion: humerus (-0.3134299 0.392559 0.03934224)
    Millard2012EquilibriumMuscle m_20:
      PathPoint origin: humerus (0.3074402 0.3960913 -0.1819965)
      PathPoint insertion: radius (-0.3899481 -0.2720648 -0.07289221)
    Millard2012EquilibriumMuscle m_21:
      PathPoint origin: humerus (0.3180148 0.3607306 -0.4930479)
      PathPoint insertion: radius (0.0107473 -0.082589 -0.2778922)
    Millard2012EquilibriumMuscle m_22:
      PathPoint origin: humerus (-0.3801346 -0.1623848 0.4429097)
      PathPoint insertion: radius (-0.1767971 0.01879062 0.203019)
    Millard2012EquilibriumMuscle m_23:
      PathPoint origin: humerus (-0.1363704 0.4717821 0.4624473)
      PathPoint insertion: radius (-0.2482177 -0.002751494 -0.1991217)
    Millard2012EquilibriumMuscle m_24:
      PathPoint origin: humerus (-0.2151595 -0.4631131 0.1095643)
      PathPoint insertion: radius (0.002679023 -0.4485212 -0.2213535)
    Millard2012EquilibriumMuscle m_25:
      PathPoint origin: humerus (0.4082659 -0.2604381 -0.3551051)
      PathPoint insertion: radius (-0.01054724 0.4856505 -0.2579447)
    Millard2012EquilibriumMuscle m_26:
      PathPoint origin: humerus (0.1721355 0.2616196 -0.2623625)
      PathPoint insertion: radius (0.2282163 -0.1322169 0.1323058)
    Millard2012EquilibriumMuscle m_27:
      PathPoint origin: humerus (0.1335297 0.03577468 -0.4097102)
      PathPoint insertion: radius (0.3353025 -0.1792199 -0.3134815)
    Millard2012EquilibriumMuscle m_28:
      PathPoint origin: humerus (-0.4592249 0.09089294 0.1775644)
      PathPoint insertion: radius (-0.4834122 0.01209306 -0.2735042)
    Millard2012EquilibriumMuscle m_29:
      PathPoint origin: humerus (0.1451728 -0.3256336 0.1909377)
      PathPoint insertion: radius (-0.1132647 0.43673 -0.3624791)
    Millard2012EquilibriumMuscle m_30:
      PathPoint origin: humerus (-0.1589336 -0.3865265 0.4246936)
      PathPoint insertion: radius (0.3773394 -0.2420584 0.159984)
    Millard2012EquilibriumMuscle m_31:
      PathPoint origin: humerus (0.3172222 0.05520081 0.02965058)
      PathPoint insertion: radius (-0.2581477 -0.4068972 0.3972158)
    Millard2012EquilibriumMuscle m_32:
      PathPoint origin: humerus (0.4004181 0.1331015 -0.1609702)
      PathPoint insertion: radius (-0.1507904 0.2259557 0.3971103)
    Millard2012EquilibriumMuscle m_33:
      PathPoint origin: humerus (0.3870864 0.2798755 0.1420316)
      PathPoint insertion: radius (-0.41586 -0.3383713 0.3985542)
    Millard2012EquilibriumMuscle m_34:
      PathPoint origin: humerus (0.1064291 -0.4908029 -0.3985285)
      PathPoint insertion: radius (0.1635018 -0.4949384 -0.3391919)
    Millard2012EquilibriumMuscle m_35:
      PathPoint origin: humerus (0.04873379 0.1918952 0.1519613)
      PathPoint insertion: radius (-0.2757307 0.2121792 -0.2627509)
    Millard2012EquilibriumMuscle m_36:
      PathPoint origin: humerus (-0.1746003 0.2464914 0.1496329)
      PathPoint insertion: radius (0.3492234 0.1576129 0.0683086)
    Millard2012EquilibriumMuscle m_37:
      PathPoint origin: humerus (-0.4063252 -0.1322842 -0.2347976)
      PathPoint insertion: radius (-0.2560104 0.4730106 -0.1069023)
    Millard2012EquilibriumMuscle m_38:
      PathPoint origin: humerus (0.3920466 0.1311386 0.2948113)
      PathPoint insertion: radius (0.002637093 0.07690388 -0.007482306)
    Millard2012EquilibriumMuscle m_39:
      PathPoint origin: humerus (-0.304757 0.2224521 -0.2192276)
      PathPoint insertion: radius (-0.475684 0.1454723 -0.3228893)
    Millard2012EquilibriumMuscle m_40:
      PathPoint origin: radius (0.4404586 0.4539286 0.4148644)
      PathPoint insertion: hand (-0.1298413 -0.4845434 0.4283186)
    Millard2012EquilibriumMuscle m_41:
      PathPoint origin: radius (-0.07181585 0.4666548 0.46362)
      PathPoint insertion: hand (0.3530095 -0.2055511 -0.1149023)
    Millard2012EquilibriumMuscle m_42:
      PathPoint origin: radius (0.3511367 -0.183078 -0.3305073)
      PathPoint insertion: hand (0.05680126 0.4361548 0.1960298)
    Millard2012EquilibriumMuscle m_43:
      PathPoint origin: radius (0.07006117 -0.4028235 0.1150072)
      PathPoint insertion: hand (0.4900539 -0.359916 0.01832965)
    Millard2012EquilibriumMuscle m_44:
      PathPoint origin: radius (0.3773731 0.2407686 0.1970157)
      PathPoint insertion: hand (0.2024841 -0.1405088 -0.2064082)
    Millard2012EquilibriumMuscle m_45:
      PathPoint origin: radius (0.3093612 0.3101134 0.3670723)
      PathPoint insertion: hand (0.4132406 0.0113424 0.001516295)
    Millard2012EquilibriumMuscle m_46:
      PathPoint origin: radius (0.2982952 0.1499639 0.2019669)
      PathPoint insertion: hand (0.2957927 0.3900053 -0.1620048)
    Millard2012EquilibriumMuscle m_47:
      PathPoint origin: radius (-0.124417 -0.4060181 0.07828014)
      PathPoint insertion: hand (-0.4640577 -0.03440198 0.04264463)
    Millard2012EquilibriumMuscle m_48:
      PathPoint origin: radius (-0.2134587 0.09083326 -0.4694998)
      PathPoint insertion: hand (-0.4626518 0.3226006 -0.1398094)
    Millard2012EquilibriumMuscle m_49:
      PathPoint origin: radius (-0.3729395 0.02224326 0.2699936)
      PathPoint insertion: hand (-0.284179 0.1228905 -0.4146525)
    Millard2012EquilibriumMuscle m_50:
      PathPoint origin: radius (-0.4483183 0.03135463 0.04063512)
      PathPoint insertion: hand (0.1374299 0.2260913 0.4758521)
    Millard2012EquilibriumMuscle m_51:
      PathPoint origin: radius (0.01630035 -0.1770435 0.2951862)
      PathPoint insertion: hand (-0.2291677 -0.06102858 -0.4215436)
    Millard2012EquilibriumMuscle m_52:
      PathPoint origin: radius (-0.4746493 0.4626484 0.3359801)
      PathPoint insertion: hand (0.1959742 -0.09104706 -0.3267057)
    Millard2012EquilibriumMuscle m_53:
      PathPoint origin: radius (-0.343563 -0.2497571 0.04922666)
      PathPoint insertion: hand (0.2145959 0.1601974 -0.2200661)
    Millard2012EquilibriumMuscle m_54:
      PathPoint origin: radius (0.4548653 0.2378969 0.05435405)
      PathPoint insertion: hand (0.1117207 -0.08039994 -0.252269)
    Millard2012EquilibriumMuscle m_55:
      PathPoint origin: radius (-0.1440273 0.2578461 -0.4856065)
      PathPoint insertion: hand (-0.3839274 -0.4539974 -0.4592712)
    Millard2012EquilibriumMuscle m_56:
      PathPoint origin: radius (0.3554606 0.2036579 -0.02582617)
      PathPoint insertion: hand (-0.4021658 -0.008384125 -0.02652823)
    Millard2012EquilibriumMuscle m_57:
      PathPoint origin: radius (-0.3267981 -0.06614835 -0.1014953)
      PathPoint insertion: hand (0.1158501 0.1350937 -0.454696)
    Millard2012EquilibriumMuscle m_58:
      PathPoint origin: radius (-0.1253874 0.1258599 0.003136259)
      PathPoint insertion: hand (0.3564898 0.1586936 -0.3370656)
    Millard2012EquilibriumMuscle m_59:
      PathPoint origin: radius (-0.4294313 0.1424193 -0.4734887)
      PathPoint insertion: hand (0.08577558 0.4402302 0.07547418)
    Millard2012EquilibriumMuscle m_60:
      PathPoint origin: humerus (-0.1118301 0.1432882 -0.04174711)
      PathPoint insertion: hand (0.04561679 0.4414648 -0.1138974)
    Millard2012EquilibriumMuscle m_61:
      PathPoint origin: humerus (0.4611906 0.4053506 -0.3042089)
      PathPoint insertion: hand (-0.4306387 -0.399222 -0.4817782)
    Millard2012EquilibriumMuscle m_62:
      PathPoint origin: humerus (-0.405557 0.1830068 -0.4288114)
      PathPoint insertion: hand (-0.1810244 0.3448753 -0.4767281)
    Millard2012EquilibriumMuscle m_63:
      PathPoint origin: humerus (0.3144685 -0.2181452 -0.3818352)
      PathPoint insertion: hand (0.1967372 0.1289428 0.377472)
    Millard2012EquilibriumMuscle m_64:
      PathPoint origin: humerus (0.235071 0.3034809 -0.2179654)
      PathPoint insertion: hand (-0.3225605 0.2506148 0.3068347)
    Millard2012EquilibriumMuscle m_65:
      PathPoint origin: humerus (0.4905051 -0.08738232 -0.1279819)
      PathPoint insertion: hand (0.276413 -0.1591965 0.4307573)
    Millard2012EquilibriumMuscle m_66:
      PathPoint origin: humerus (0.3584128 -0.07100597 0.2508711)
      PathPoint insertion: hand (0.2545429 -0.3968761 0.4025529)
    Millard2012EquilibriumMuscle m_67:
      PathPoint origin: humerus (0.005252372 0.3264575 -0.1799504)
      PathPoint insertion: hand (0.3955232 -0.1107983 -0.4891623)
    Millard2012EquilibriumMuscle m_68:
      PathPoint origin: humerus (0.405382 -0.4087133 -0.1806864)
      PathPoint insertion: hand (0.450062 0.4506071 0.07343789)
    Millard2012EquilibriumMuscle m_69:
      PathPoint origin: humerus (0.1318372 -0.05155448 -0.2067892)
      PathPoint insertion: hand (-0.1713355 0.1725185 0.2523745)
    Millard2012EquilibriumMuscle m_70:
      PathPoint origin: humerus (0.291579 0.2896181 -0.4087939)
      PathPoint insertion: hand (-0.005579695 -0.4424412 0.04952888)
    Millard2012EquilibriumMuscle m_71:
      PathPoint origin: humerus (-0.0584695 0.3877042 -0.149085)
      PathPoint insertion: hand (-0.382933 -0.3570083 0.2615106)
    Millard2012EquilibriumMuscle m_72:
      PathPoint origin: humerus (0.1182181 -0.3988773 -0.4158932)
      PathPoint insertion: hand (0.2009691 -0.427237 0.3218601)
    Millard2012EquilibriumMuscle m_73:
      PathPoint origin: humerus (0.2062422 -0.4186512 -0.4151623)
      PathPoint insertion: hand (0.4866396 -0.1257292 -0.1293579)
    Millard2012EquilibriumMuscle m_74:
      PathPoint origin: humerus (0.3127996 0.4472486 0.4860011)
      PathPoint insertion: hand (0.2533782 -0.1237404 -0.4164993)
    Millard2012EquilibriumMuscle m_75:
      PathPoint origin: humerus (0.2771469 0.05840425 -0.07577799)
      PathPoint insertion: hand (0.4063544 -0.3888025 -0.007374896)
    Millard2012EquilibriumMuscle m_76:
      PathPoint origin: humerus (-0.4886464 -0.03133936 -0.4436967)
      PathPoint insertion: hand (-0.3811821 -0.3824738 0.1492103)
    Millard2012EquilibriumMuscle m_77:
      PathPoint origin: humerus (0.2460449 0.08336877 0.4621725)
      PathPoint insertion: hand (-0.1251294 -0.2142879 0.3685991)
    Millard2012EquilibriumMuscle m_78:
      PathPoint origin: humerus (-0.2764042 0.4632225 -0.4878455)
      PathPoint insertion: hand (0.4698788 -0.4568401 0.3911431)
    Millard2012EquilibriumMuscle m_79:
      PathPoint origin: humerus (0.02770111 0.4929648 -0.4262034)
      PathPoint insertion: hand (0.05385428 0.4693025 0.02309784)
